!--- OpenDSS Linecodes file generated from Show LINECONSTANTS command
!--- Frequency = 60 Hz, Earth resistivity = 100 ohm-m

New Linecode.quadcircuit nphases=17  Units=km
~ Rmatrix=[0.190558  |0.0580748  0.190558  |0.0580746  0.0580748  0.190558  |0.0580187  0.0580186  0.0580184  0.190446  |0.0580186  0.0580187  0.0580186  0.0579625  0.190446  |0.0580184  0.0580186  0.0580187  0.0579623  0.0579624  0.190446  |0.0579625  0.0579625  0.0579623  ]
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~ Xmatrix=[0.868584  |0.515614  0.868584  |0.446527  0.485043  0.868584  |0.515672  0.489541  0.44099  0.8687  |0.489541  0.515672  0.471238  0.51573  0.8687  |0.44099  0.471238  0.515672  0.446643  0.485159  0.8687  |0.463468  0.455056  0.427994  ]
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~ Cmatrix=[10.55  |-1.73851  11.0981  |-0.318506  -1.06732  10.2557  |-1.92225  -0.882472  -0.218354  10.9123  |-0.884209  -1.59307  -0.676542  -1.55055  11.2117  |-0.220645  -0.667496  -2.13759  -0.240202  -0.938222  10.6575  |-0.615536  -0.314266  -0.141457  ]
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
New Linecode.doublecircuit nphases=9  Units=km
~ Rmatrix=[0.190558  |0.0580748  0.190558  |0.0580746  0.0580748  0.190558  |0.0580187  0.0580186  0.0580184  0.190446  |0.0580045  0.0580046  0.0580045  0.0579484  0.190418  |0.0580184  0.0580186  0.0580187  0.0579623  0.0579484  0.190446  |0.0581311  0.0581312  0.0581311  0.0580748  0.0580608  0.0580748  0.190671  |0.0581875  0.0581876  0.0581875  0.0581311  0.0581171  0.0581311  0.0582441  1.06361  |0.0582157  0.0582158  0.0582157  0.0581593  0.0581453  0.0581593  0.0582723  0.0583289  1.06366  ]
~ Xmatrix=[0.868584  |0.515614  0.868584  |0.446527  0.485043  0.868584  |0.515672  0.489541  0.44099  0.8687  |0.472731  0.497383  0.472731  0.497441  0.868729  |0.44099  0.471238  0.515672  0.446643  0.497441  0.8687  |0.483789  0.514717  0.476439  0.452583  0.454412  0.449199  0.868468  |0.452467  0.463025  0.449083  0.427554  0.426666  0.425771  0.51544  1.00385  |0.439146  0.446247  0.436736  0.417206  0.415857  0.415842  0.48484  0.567615  1.00379  ]
~ Cmatrix=[10.3648  |-1.91294  10.9014  |-0.45146  -1.19974  10.0963  |-2.30954  -1.22651  -0.466387  10.0121  |-0.925439  -1.45965  -1.03815  -1.86178  10.1744  |-0.43898  -0.888355  -2.45438  -0.686162  -1.91257  9.93559  |-1.18595  -1.89586  -1.15601  -0.548529  -0.533754  -0.562879  10.5751  |-0.564987  -0.542125  -0.577401  -0.292882  -0.239279  -0.299433  -1.75171  9.07652  |-0.481734  -0.403565  -0.50188  -0.274644  -0.215043  -0.28137  -1.0625  -2.74204  8.7124  ]

New Linecode.singlecircuit nphases=5  Units=km
~ Rmatrix=[0.190558  |0.0580607  0.19053  |0.0580746  0.0580607  0.190558  |0.0581311  0.0581171  0.0581311  0.245238  |0.0581875  0.0581735  0.0581875  0.0582441  1.06361  ]
~ Xmatrix=[0.868584  |0.497325  0.868613  |0.446527  0.497325  0.868584  |0.483789  0.498506  0.476439  0.881721  |0.452467  0.454296  0.449083  0.51544  1.00385  ]
~ Cmatrix=[9.34393  |-2.21046  9.9367  |-0.997143  -2.24979  9.27241  |-1.64312  -1.8341  -1.48396  9.85518  |-0.959552  -0.789194  -0.931526  -2.14449  8.1337  ]

New Linecode.1phline nphases=3  Units=km
~ Rmatrix=[0.419052  |0.0581311  0.74067  |0.0581875  0.0582441  1.06361  ]
~ Xmatrix=[0.967933  |0.483789  1.01318  |0.452467  0.51544  1.00385  ]
~ Cmatrix=[7.98727  |-2.01702  8.22913  |-1.29627  -2.31971  7.85088  ]
